**
** Heading +++++++++++++++++++++++++++++++++++++++++++++++++
**
*Heading
Hash: o4g8ZYh8, Date: 10/05/2026, Unit system: MM_TON_S_C
**
** Nodes +++++++++++++++++++++++++++++++++++++++++++++++++++
**
*Node
1, 0.00000000E+000, 2.50000000E+001
2, 2.50000000E+001, 2.50000000E+001
3, 0.00000000E+000, 0.00000000E+000
4, 2.50000000E+001, 0.00000000E+000
5, 5.00000000E+001, 2.50000000E+001
6, 5.00000000E+001, 0.00000000E+000
7, 7.50000000E+001, 2.50000000E+001
8, 7.50000000E+001, 0.00000000E+000
9, 1.00000000E+002, 2.50000000E+001
10, 1.00000000E+002, 0.00000000E+000
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**
** Elements ++++++++++++++++++++++++++++++++++++++++++++++++
**
*Element, Type=CPS8, Elset=Compound-1
1, 1, 49, 274, 46, 50, 275, 276, 47
2, 49, 3, 52, 274, 51, 53, 277, 275
3, 46, 274, 55, 2, 276, 278, 56, 48
4, 274, 52, 4, 55, 277, 54, 57, 278
5, 2, 55, 279, 58, 56, 280, 281, 59
6, 55, 4, 61, 279, 57, 62, 282, 280
7, 58, 279, 64, 5, 281, 283, 65, 60
8, 279, 61, 6, 64, 282, 63, 66, 283
9, 5, 64, 284, 67, 65, 285, 286, 68
10, 64, 6, 70, 284, 66, 71, 287, 285
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**
** Node sets +++++++++++++++++++++++++++++++++++++++++++++++
**
*Nset, Nset=Internal_Selection-1_T_0
1, 3, 4, 6, 8, 10, 15, 16, 25, 26, 35, 36, 45, 49, 50, 51,
52, 53, 54, 61, 62, 63, 70, 71, 72, 79, 80, 81, 109, 110, 111, 115,
116, 117, 163, 164, 165, 169, 170, 171, 217, 218, 219, 223, 224, 225, 271, 272,
273
*Nset, Nset=Internal_Selection-1_T_20
41, 42, 43, 44, 45, 247, 248, 249, 256, 257, 258, 262, 263, 264, 268, 269,
270
*Nset, Nset=Internal_Selection-1_NODE_SELECTION-1
2, 5, 7, 9, 11, 12, 13, 14, 17, 18, 19, 20, 21, 22, 23, 24,
27, 28, 29, 30, 31, 32, 33, 34, 37, 38, 39, 40
**
** Element sets ++++++++++++++++++++++++++++++++++++++++++++
**
*Elset, Elset=Internal_Selection-1_Solid_Section-1
Compound-1
**
** Surfaces ++++++++++++++++++++++++++++++++++++++++++++++++
**
**
** Physical constants ++++++++++++++++++++++++++++++++++++++
**
**
** Coordinate systems ++++++++++++++++++++++++++++++++++++++
**
**
** Materials +++++++++++++++++++++++++++++++++++++++++++++++
**
*Material, Name=Material-1
*Conductivity
1
**
** Sections ++++++++++++++++++++++++++++++++++++++++++++++++
**
*Solid section, Elset=Internal_Selection-1_Solid_Section-1, Material=Material-1
1
**
** Pre-tension sections ++++++++++++++++++++++++++++++++++++
**
**
** Constraints +++++++++++++++++++++++++++++++++++++++++++++
**
**
** Surface interactions ++++++++++++++++++++++++++++++++++++
**
**
** Contact pairs +++++++++++++++++++++++++++++++++++++++++++
**
**
** Amplitudes ++++++++++++++++++++++++++++++++++++++++++++++
**
**
** Initial conditions ++++++++++++++++++++++++++++++++++++++
**
**
** Steps +++++++++++++++++++++++++++++++++++++++++++++++++++
**
**
** Step-1 ++++++++++++++++++++++++++++++++++++++++++++++++++
**
*Step
*Heat transfer, Solver=Pardiso, Steady state
**
** Controls ++++++++++++++++++++++++++++++++++++++++++++++++
**
**
** Output frequency ++++++++++++++++++++++++++++++++++++++++
**
**
** Boundary conditions +++++++++++++++++++++++++++++++++++++
**
*Boundary, op=New
** Name: T_0
*Boundary
Internal_Selection-1_T_0, 11, 11, 0
** Name: T_20
*Boundary
Internal_Selection-1_T_20, 11, 11, 20
**
** Loads +++++++++++++++++++++++++++++++++++++++++++++++++++
**
*Cflux, op=New
**
** Defined fields ++++++++++++++++++++++++++++++++++++++++++
**
**
** History outputs +++++++++++++++++++++++++++++++++++++++++
**
*Node print, Nset=Internal_Selection-1_NODE_SELECTION-1, Global=Yes
NT
**
** Field outputs +++++++++++++++++++++++++++++++++++++++++++
**
*Node file
NT, RFL
*El file
HFL
**
** End step ++++++++++++++++++++++++++++++++++++++++++++++++
**
*End step
