**
** Heading +++++++++++++++++++++++++++++++++++++++++++++++++
**
*Heading
Hash: N6WQZmPs, Date: 10/05/2026, Unit system: MM_TON_S_C
**
** Nodes +++++++++++++++++++++++++++++++++++++++++++++++++++
**
*Node
1, 0.00000000E+000, 3.65000000E+001
2, 1.50000000E+001, 3.65000000E+001
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**
** Elements ++++++++++++++++++++++++++++++++++++++++++++++++
**
*Element, Type=CPS6, Elset=Compound-1
1, 396, 5527, 395, 5846, 5847, 895
2, 397, 5526, 396, 5848, 5849, 896
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*Element, Type=CPS8, Elset=Compound-1
448, 5656, 5658, 62, 63, 6740, 6741, 99, 6742
449, 60, 5655, 5653, 59, 6743, 6744, 6745, 96
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**
** Node sets +++++++++++++++++++++++++++++++++++++++++++++++
**
*Nset, Nset=Internal-1_Internal_Selection-1_Convective_Film-1
13, 14, 4298, 4299, 4300, 4301
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*Nset, Nset=Internal-1_Internal_Selection-1_Convective_Film-2
3, 4, 117, 118, 119, 120
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**
** Element sets ++++++++++++++++++++++++++++++++++++++++++++
**
*Elset, Elset=Element_Set-1
29878, 29879, 29880, 29881, 29882, 29883
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*Elset, Elset=Element_Set-2
29803, 29804, 29805, 29806, 29807, 29808
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*Elset, Elset=Element_Set-3
1324, 1325, 1326, 1327, 1328, 1329
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*Elset, Elset=Element_Set-4
1, 2, 3, 4, 5, 6
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*Elset, Elset=Internal-1_Internal_Selection-1_Convective_Film-1_S5
30017, 30148, 30173, 30179, 30180, 30188
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*Elset, Elset=Internal-1_Internal_Selection-1_Convective_Film-1_S6
31216, 31414, 31415, 31594, 31595, 31605
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*Elset, Elset=Internal-1_Internal_Selection-1_Convective_Film-1_S3
31277, 31289, 31476, 31833, 31837, 31838
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*Elset, Elset=Internal-1_Internal_Selection-1_Convective_Film-1_S4
31537, 31708, 31834, 31835, 31836, 31861
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*Elset, Elset=Internal-1_Internal_Selection-1_Convective_Film-2_S5
1, 2, 3, 4, 5, 6
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*Elset, Elset=Internal-1_Internal_Selection-1_Convective_Film-2_S6
556
*Elset, Elset=Internal-1_Internal_Selection-1_Convective_Film-2_S3
628, 629, 630, 631, 632, 633
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*Elset, Elset=Internal-1_Internal_Selection-1_Convective_Film-2_S4
1286
**
** Surfaces ++++++++++++++++++++++++++++++++++++++++++++++++
**
*Surface, Name=Internal_Selection-1_Convective_Film-1, Type=Element
Internal-1_Internal_Selection-1_Convective_Film-1_S5, S3
Internal-1_Internal_Selection-1_Convective_Film-1_S6, S4
Internal-1_Internal_Selection-1_Convective_Film-1_S3, S1
Internal-1_Internal_Selection-1_Convective_Film-1_S4, S2
*Surface, Name=Internal_Selection-1_Convective_Film-2, Type=Element
Internal-1_Internal_Selection-1_Convective_Film-2_S5, S3
Internal-1_Internal_Selection-1_Convective_Film-2_S6, S4
Internal-1_Internal_Selection-1_Convective_Film-2_S3, S1
Internal-1_Internal_Selection-1_Convective_Film-2_S4, S2
**
** Physical constants ++++++++++++++++++++++++++++++++++++++
**
**
** Coordinate systems ++++++++++++++++++++++++++++++++++++++
**
**
** Materials +++++++++++++++++++++++++++++++++++++++++++++++
**
*Material, Name=Material-1
*Conductivity
1.15
*Material, Name=Material-2
*Conductivity
0.12
*Material, Name=Material-3
*Conductivity
0.029
*Material, Name=Material-4
*Conductivity
230
**
** Sections ++++++++++++++++++++++++++++++++++++++++++++++++
**
*Solid section, Elset=Element_Set-1, Material=Material-1
1
*Solid section, Elset=Element_Set-2, Material=Material-2
1
*Solid section, Elset=Element_Set-3, Material=Material-3
1
*Solid section, Elset=Element_Set-4, Material=Material-4
1
**
** Pre-tension sections ++++++++++++++++++++++++++++++++++++
**
**
** Constraints +++++++++++++++++++++++++++++++++++++++++++++
**
**
** Surface interactions ++++++++++++++++++++++++++++++++++++
**
**
** Contact pairs +++++++++++++++++++++++++++++++++++++++++++
**
**
** Amplitudes ++++++++++++++++++++++++++++++++++++++++++++++
**
**
** Initial conditions ++++++++++++++++++++++++++++++++++++++
**
**
** Steps +++++++++++++++++++++++++++++++++++++++++++++++++++
**
**
** Step-1 ++++++++++++++++++++++++++++++++++++++++++++++++++
**
*Step
*Heat transfer, Solver=Pardiso, Steady state
**
** Controls ++++++++++++++++++++++++++++++++++++++++++++++++
**
**
** Output frequency ++++++++++++++++++++++++++++++++++++++++
**
**
** Boundary conditions +++++++++++++++++++++++++++++++++++++
**
*Boundary, op=New
**
** Loads +++++++++++++++++++++++++++++++++++++++++++++++++++
**
*Cflux, op=New
*Film, op=New
** Name: Convective_Film-1
*Film
Internal-1_Internal_Selection-1_Convective_Film-1_S5, F3, 0, 0.0167
Internal-1_Internal_Selection-1_Convective_Film-1_S6, F4, 0, 0.0167
Internal-1_Internal_Selection-1_Convective_Film-1_S3, F1, 0, 0.0167
Internal-1_Internal_Selection-1_Convective_Film-1_S4, F2, 0, 0.0167
** Name: Convective_Film-2
*Film
Internal-1_Internal_Selection-1_Convective_Film-2_S5, F3, 20, 0.00909
Internal-1_Internal_Selection-1_Convective_Film-2_S6, F4, 20, 0.00909
Internal-1_Internal_Selection-1_Convective_Film-2_S3, F1, 20, 0.00909
Internal-1_Internal_Selection-1_Convective_Film-2_S4, F2, 20, 0.00909
**
** Defined fields ++++++++++++++++++++++++++++++++++++++++++
**
**
** History outputs +++++++++++++++++++++++++++++++++++++++++
**
**
** Field outputs +++++++++++++++++++++++++++++++++++++++++++
**
*Node file
NT, RFL
*El file
HFL
**
** End step ++++++++++++++++++++++++++++++++++++++++++++++++
**
*End step
