**
** Heading +++++++++++++++++++++++++++++++++++++++++++++++++
**
*Heading
Hash: ZPJKthb9, Date: 10/05/2026, Unit system: MM_TON_S_C
**
** Nodes +++++++++++++++++++++++++++++++++++++++++++++++++++
**
*Node
1, 5.09599290E+002, -4.05564589E+002, 1.15000000E+003
2, 5.09599290E+002, -1.40556459E+003, 1.15000000E+003
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**
** Elements ++++++++++++++++++++++++++++++++++++++++++++++++
**
*Element, Type=C3D8, Elset=Solid_part-109
1, 3829, 130, 1, 163, 34274, 3862, 234, 4063
2, 34274, 3862, 234, 4063, 34275, 3863, 235, 4064
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*Element, Type=C3D8, Elset=Solid_part-110
273, 4099, 164, 3, 278, 34373, 3966, 274, 5314
274, 34373, 3966, 274, 5314, 34374, 3965, 275, 5345
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*Element, Type=C3D8, Elset=Solid_part-111
4625, 6430, 474, 13, 479, 37442, 6447, 489, 6466
4626, 37442, 6447, 489, 6466, 37443, 6446, 490, 6469
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*Element, Type=C3D8, Elset=Solid_part-112
4689, 21, 510, 6484, 511, 514, 6485, 37469, 6488
4690, 514, 6485, 37469, 6488, 515, 6486, 37470, 6489
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*Element, Type=C3D8, Elset=Solid_part-113
4705, 1, 130, 3829, 163, 520, 6498, 37472, 6497
4706, 520, 6498, 37472, 6497, 25, 530, 6565, 524
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*Element, Type=C3D8, Elset=Solid_part-114
4841, 6, 598, 6598, 277, 233, 7753, 37505, 4098
4842, 233, 7753, 37505, 4098, 232, 7720, 37506, 4097
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*Element, Type=C3D8, Elset=Solid_part-115
7153, 8875, 798, 33, 831, 38594, 8910, 901, 9111
7154, 38594, 8910, 901, 9111, 38595, 8909, 900, 9110
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*Element, Type=C3D8, Elset=Solid_part-116
7425, 9145, 946, 34, 865, 38693, 9150, 902, 9007
7426, 38693, 9150, 902, 9007, 38694, 9149, 903, 9008
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*Element, Type=C3D8, Elset=Solid_part-117
7457, 9172, 966, 45, 969, 38702, 9177, 972, 9183
7458, 38702, 9177, 972, 9183, 38703, 9176, 973, 9186
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*Element, Type=C3D8, Elset=Solid_part-118
7489, 9193, 979, 47, 1014, 38711, 9292, 1018, 10482
7490, 38711, 9292, 1018, 10482, 38712, 9325, 1019, 10485
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*Element, Type=C3D8, Elset=Solid_part-119
12113, 10678, 1123, 49, 1084, 41978, 10779, 1122, 10645
12114, 41978, 10779, 1122, 10645, 41979, 10778, 1121, 10612
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*Element, Type=C3D8, Elset=Solid_part-120
12657, 23, 512, 10993, 1207, 521, 6491, 42275, 11008
12658, 521, 6491, 42275, 11008, 522, 6492, 42276, 11011
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*Element, Type=C3D8, Elset=Solid_part-121
12689, 25, 530, 6565, 524, 1224, 11020, 42284, 11017
12690, 1224, 11020, 42284, 11017, 1225, 11021, 42285, 11018
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*Element, Type=C3D8, Elset=Solid_part-122
12961, 11254, 1300, 61, 1333, 42383, 11355, 1374, 11467
12962, 42383, 11355, 1374, 11467, 42384, 11354, 1373, 11464
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*Element, Type=C3D8, Elset=Solid_part-123
13505, 11569, 1384, 62, 1338, 42680, 11580, 1375, 11454
13506, 42680, 11580, 1375, 11454, 42681, 11579, 1376, 11457
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*Element, Type=C3D8, Elset=Solid_part-124
13569, 11596, 970, 41, 952, 42707, 9180, 956, 9157
13570, 42707, 9180, 956, 9157, 42708, 9179, 957, 9158
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*Element, Type=C3D8, Elset=Solid_part-125
13585, 11604, 1397, 65, 1430, 42710, 11705, 1393, 11808
13586, 42710, 11705, 1393, 11808, 42711, 11704, 1394, 11839
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*Element, Type=C3D8, Elset=Solid_part-126
14097, 17, 486, 6475, 498, 1543, 11996, 42989, 12003
14098, 1543, 11996, 42989, 12003, 74, 1544, 12006, 1552
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*Element, Type=C3D8, Elset=Solid_part-127
14129, 70, 1465, 11901, 1474, 1555, 12015, 42998, 12052
14130, 1555, 12015, 42998, 12052, 56, 1211, 12085, 1593
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*Element, Type=C3D8, Elset=Solid_part-128
14385, 12176, 480, 15, 1391, 43091, 6465, 504, 11597
14386, 43091, 6465, 504, 11597, 43092, 6464, 505, 11598
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*Element, Type=C3D8, Elset=Solid_part-129
14417, 19, 501, 12182, 1625, 1551, 12002, 43100, 12186
14418, 1551, 12002, 43100, 12186, 55, 1209, 10995, 1210
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*Element, Type=C3D8, Elset=Solid_part-130
14433, 12187, 1626, 77, 1659, 43103, 13212, 1756, 13563
14434, 43103, 13212, 1756, 13563, 43104, 13211, 1755, 13532
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*Element, Type=C3D8, Elset=Solid_part-131
18785, 14617, 1830, 78, 1723, 46172, 14718, 1759, 13311
18786, 46172, 14718, 1759, 13311, 46173, 14717, 1758, 13310
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*Element, Type=C3D8, Elset=Solid_part-132
19297, 83, 1870, 14821, 1936, 2007, 15912, 46451, 16305
19298, 2007, 15912, 46451, 16305, 2006, 15911, 46452, 16304
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*Element, Type=C3D8, Elset=Solid_part-133
23921, 89, 2113, 17395, 2148, 2152, 17496, 49718, 17503
23922, 2152, 17496, 49718, 17503, 2153, 17495, 49719, 17536
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*Element, Type=C3D8, Elset=Solid_part-134
24465, 90, 2149, 17611, 2158, 2194, 17710, 50015, 17749
24466, 2194, 17710, 50015, 17749, 92, 2195, 17782, 2237
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*Element, Type=C3D8, Elset=Solid_part-135
24737, 90, 2158, 17881, 2270, 2194, 17749, 50114, 17948
24738, 2194, 17749, 50114, 17948, 92, 2237, 17949, 2339
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*Element, Type=C3D8, Elset=Solid_part-136
24873, 97, 2340, 17982, 2406, 2409, 18081, 50147, 20259
24874, 2409, 18081, 50147, 20259, 2410, 18114, 50148, 20262
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*Element, Type=C3D8, Elset=Solid_part-137
29497, 24, 1558, 12083, 1213, 525, 20457, 53414, 11002
29498, 525, 20457, 53414, 11002, 526, 20488, 53415, 11003
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*Element, Type=C3D8, Elset=Solid_part-138
30009, 22, 1836, 20745, 513, 517, 14719, 53693, 6494
30010, 517, 14719, 53693, 6494, 518, 14750, 53694, 6495
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*Element, Type=C3D8, Elset=Solid_part-139
30265, 26, 565, 20810, 2577, 1217, 11122, 53786, 20742
30266, 1217, 11122, 53786, 20742, 1218, 11155, 53787, 20743
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*Element, Type=C3D8, Elset=Solid_part-140
34617, 3, 164, 4099, 278, 528, 6532, 56855, 20779
34618, 528, 6532, 56855, 20779, 26, 565, 20810, 2577
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*Element, Type=C3D8, Elset=Solid_part-141
36793, 96, 2339, 17949, 2306, 2751, 23112, 57878, 23280
36794, 2751, 23112, 57878, 23280, 2750, 23113, 57879, 23247
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*Element, Type=C3D8, Elset=Solid_part-142
37065, 96, 2306, 23346, 2822, 2751, 23280, 57977, 23550
37066, 2751, 23280, 57977, 23550, 2750, 23247, 57978, 23547
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*Element, Type=C3D8, Elset=Solid_part-143
37609, 23652, 963, 39, 2897, 58274, 23745, 2962, 23782
37610, 58274, 23745, 2962, 23782, 14617, 1830, 78, 1723
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*Element, Type=C3D8, Elset=Solid_part-144
37865, 23813, 1396, 44, 2931, 58367, 23844, 2963, 23748
37866, 58367, 23844, 2963, 23748, 20745, 513, 22, 1836
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*Element, Type=C3D8, Elset=Solid_part-145
37993, 23846, 1390, 42, 2967, 58398, 11602, 959, 23880
37994, 58398, 11602, 959, 23880, 58399, 11601, 960, 23911
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*Element, Type=C3D8, Elset=Solid_part-146
38249, 23973, 832, 35, 3002, 58491, 9012, 944, 25250
38250, 58491, 9012, 944, 25250, 58492, 9011, 943, 25219
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*Element, Type=C3D8, Elset=Solid_part-147
42601, 26304, 949, 36, 3066, 61560, 9162, 905, 24996
42602, 61560, 9162, 905, 24996, 61561, 9161, 906, 25027
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*Element, Type=C3D8, Elset=Solid_part-148
43113, 25281, 909, 40, 3136, 61839, 26406, 3170, 26472
43114, 61839, 26406, 3170, 26472, 12187, 1626, 77, 1659
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*Element, Type=C3D8, Elset=Solid_part-149
45289, 95, 2305, 17915, 2271, 3172, 26503, 62862, 26506
45290, 3172, 26503, 62862, 26506, 3173, 26504, 62863, 26507
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*Element, Type=C3D8, Elset=Solid_part-150
45561, 116, 3209, 26638, 3243, 3244, 26671, 62961, 27793
45562, 3244, 26671, 62961, 27793, 3245, 26704, 62962, 27794
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*Element, Type=C3D8, Elset=Solid_part-151
47873, 84, 1903, 27859, 3312, 2115, 17461, 64050, 29113
47874, 2115, 17461, 64050, 29113, 2114, 17428, 64051, 29080
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*Element, Type=C3D8, Elset=Solid_part-152
52497, 29146, 2080, 88, 2198, 67317, 16306, 2079, 17745
52498, 67317, 16306, 2079, 17745, 67318, 16307, 2078, 17744
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*Element, Type=C3D8, Elset=Solid_part-153
54809, 30334, 3348, 93, 3451, 68406, 29212, 2231, 31719
54810, 68406, 29212, 2231, 31719, 68407, 29213, 2230, 31716
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*Element, Type=C3D8, Elset=Solid_part-154
59433, 89, 2152, 17503, 2148, 3278, 31819, 71673, 27826
59434, 3278, 31819, 71673, 27826, 99, 3593, 31825, 2442
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*Element, Type=C3D8, Elset=Solid_part-155
59705, 31924, 2195, 92, 2753, 71772, 17782, 2237, 23117
59706, 71772, 17782, 2237, 23117, 71773, 17783, 2238, 23120
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*Element, Type=C3D8, Elset=Solid_part-156
60249, 99, 3593, 31825, 2442, 2541, 32041, 72069, 20358
60250, 2541, 32041, 72069, 20358, 2542, 32042, 72070, 20391
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*Element, Type=C3D8, Elset=Solid_part-157
60793, 9169, 953, 38, 908, 72366, 32151, 3609, 32153
60794, 72366, 32151, 3609, 32153, 32154, 3606, 53, 3610
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*Element, Type=C3D8, Elset=Solid_part-158
60809, 11603, 975, 43, 962, 72369, 32157, 3605, 32152
60810, 72369, 32157, 3605, 32152, 6484, 511, 21, 510
60811, 1396, 11603, 962, 44, 23844, 72369, 32152, 2963
60812, 23844, 72369, 32152, 2963, 513, 6484, 510, 22
60813, 1392, 20, 975, 11603, 12185, 1547, 32157, 72369
60814, 12185, 1547, 32157, 72369, 512, 23, 511, 6484
60815, 66, 1392, 11603, 1396, 1556, 12185, 72369, 23844
60816, 1556, 12185, 72369, 23844, 24, 512, 6484, 513
*Element, Type=C3D8, Elset=Solid_part-159
60817, 32154, 3606, 53, 3610, 72370, 32164, 1164, 32169
60818, 72370, 32164, 1164, 32169, 72371, 32161, 1163, 32168
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*Element, Type=C3D8, Elset=Solid_part-160
60849, 11470, 1339, 63, 1381, 72379, 27760, 3242, 32206
60850, 72379, 27760, 3242, 32206, 10786, 1129, 52, 1201
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*Element, Type=C3D8, Elset=Solid_part-161
61121, 91, 2191, 17602, 2157, 3614, 32209, 72478, 32224
61122, 3614, 32209, 72478, 32224, 3613, 32210, 72479, 32225
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*Element, Type=C3D8, Elset=Solid_part-162
61185, 32236, 1168, 54, 3618, 72505, 10960, 1206, 32271
61186, 72505, 10960, 1206, 32271, 72506, 10927, 1205, 32270
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*Element, Type=C3D8, Elset=Solid_part-163
61457, 32272, 2002, 86, 3621, 72604, 16105, 2040, 32377
61458, 72604, 16105, 2040, 32377, 72605, 16102, 2039, 32374
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*Element, Type=C3D8, Elset=Solid_part-164
62001, 32032, 2234, 73, 1546, 72901, 32380, 1548, 12012
62002, 72901, 32380, 1548, 12012, 72902, 32381, 1549, 12013
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*Element, Type=C3D8, Elset=Solid_part-165
62065, 9112, 866, 37, 945, 72928, 32205, 3611, 32407
62066, 72928, 32205, 3611, 32407, 32236, 1168, 54, 3618
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*Element, Type=C3D8, Elset=Solid_part-166
62201, 11587, 1387, 64, 1380, 72961, 31822, 3277, 32170
62202, 72961, 31822, 3277, 32170, 32218, 2155, 51, 1167
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*Element, Type=C3D8, Elset=Solid_part-167
62233, 9190, 971, 46, 978, 72970, 17914, 2304, 32410
62234, 72970, 17914, 2304, 32410, 32411, 2233, 91, 3614
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*Element, Type=C3D8, Elset=Solid_part-168
62249, 32414, 3415, 119, 3630, 72973, 30333, 3448, 32513
62250, 72973, 30333, 3448, 32513, 72974, 30332, 3447, 32510
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*Element, Type=C3D8, Elset=Solid_part-169
62521, 17746, 2191, 91, 2233, 73072, 32209, 3614, 32411
62522, 73072, 32209, 3614, 32411, 73073, 32210, 3613, 32412
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*Element, Type=C3D8, Elset=Solid_part-170
62553, 32519, 3521, 122, 3631, 73081, 31818, 3589, 32626
62554, 73081, 31818, 3589, 32626, 73082, 31815, 3588, 32625
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*Element, Type=C3D8, Elset=Solid_part-171
63097, 32627, 3634, 124, 3653, 73378, 33310, 3726, 34034
63098, 73378, 33310, 3726, 34034, 73379, 33309, 3725, 34031
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*Element, Type=C3D8, Elset=Solid_part-172
65817, 74, 3782, 34094, 3599, 1552, 34151, 75259, 32398
65818, 1552, 34151, 75259, 32398, 1553, 34152, 75260, 32401
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**
** Node sets +++++++++++++++++++++++++++++++++++++++++++++++
**
*Nset, Nset=Internal-1_Internal_Selection-1_alpha
47, 48, 49, 50, 83, 84
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*Nset, Nset=Internal-1_Internal_Selection-1_beta
7, 8, 11, 12, 30, 31
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*Nset, Nset=Internal-1_Internal_Selection-1_gamma
13, 14, 15, 16, 17, 19
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**
** Element sets ++++++++++++++++++++++++++++++++++++++++++++
**
*Elset, Elset=Internal_Selection-1_Floor
Solid_part-114
*Elset, Elset=Internal_Selection-1_Interior_wall
Solid_part-109,
Solid_part-110,
Solid_part-130,
Solid_part-131,
Solid_part-132,
Solid_part-133,
Solid_part-151,
Solid_part-159,
Solid_part-162
*Elset, Elset=Internal-1_Internal_Selection-1_alpha_S4
7489, 7490, 7491, 7492, 7493, 7494
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*Elset, Elset=Internal-1_Internal_Selection-1_alpha_S1
19297, 19301, 19305, 19309, 19313, 19317
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*Elset, Elset=Internal-1_Internal_Selection-1_beta_S2
276, 280, 284, 288, 292, 296
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*Elset, Elset=Internal-1_Internal_Selection-1_beta_S5
4875, 4876, 4877, 4878, 4879, 4880
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*Elset, Elset=Internal-1_Internal_Selection-1_gamma_S1
4625, 4629, 4633, 4637, 4641, 4645
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*Elset, Elset=Internal-1_Internal_Selection-1_gamma_S3
4673, 4674, 4675, 4676, 4677, 4678
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*Elset, Elset=Internal-1_Internal_Selection-1_gamma_S5
12669, 12670, 12671, 12672, 12685, 12686
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*Elset, Elset=Internal-1_Internal_Selection-1_gamma_S2
12692, 12696, 12700, 12704, 12708, 12712
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*Elset, Elset=Internal-1_Internal_Selection-1_gamma_S6
14097, 14098, 14099, 14100, 14101, 14102
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*Elset, Elset=Internal-1_Internal_Selection-1_gamma_S4
63097, 63098, 63099, 63100, 63101, 63102
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*Elset, Elset=Internal_Selection-1_Horizontal_structure
Solid_part-118,
Solid_part-119,
Solid_part-161,
Solid_part-163,
Solid_part-164,
Solid_part-168,
Solid_part-169,
Solid_part-170,
Solid_part-171,
Solid_part-172
*Elset, Elset=Missing_section-1
14097, 14098, 14099, 14100, 14101, 14102
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*Elset, Elset=Internal_Selection-1_Isolation
Solid_part-112,
Solid_part-113,
Solid_part-134,
Solid_part-135,
Solid_part-138,
Solid_part-140,
Solid_part-143,
Solid_part-144,
Solid_part-148,
Solid_part-150,
Solid_part-152,
Solid_part-154,
Solid_part-157,
Solid_part-158,
Solid_part-160,
Solid_part-165,
Solid_part-166,
Solid_part-167
*Elset, Elset=Internal_Selection-1_Exterior_wall
Solid_part-111,
Solid_part-115,
Solid_part-116,
Solid_part-117,
Solid_part-120,
Solid_part-121,
Solid_part-122,
Solid_part-123,
Solid_part-124,
Solid_part-125,
Solid_part-126,
Solid_part-127,
Solid_part-128,
Solid_part-129,
Solid_part-136,
Solid_part-137,
Solid_part-139,
Solid_part-141,
Solid_part-142,
Solid_part-145,
Solid_part-146,
Solid_part-147,
Solid_part-149,
Solid_part-153,
Solid_part-155,
Solid_part-156
**
** Surfaces ++++++++++++++++++++++++++++++++++++++++++++++++
**
*Surface, Name=Internal_Selection-1_alpha, Type=Element
Internal-1_Internal_Selection-1_alpha_S4, S4
Internal-1_Internal_Selection-1_alpha_S1, S1
*Surface, Name=Internal_Selection-1_beta, Type=Element
Internal-1_Internal_Selection-1_beta_S2, S2
Internal-1_Internal_Selection-1_beta_S5, S5
*Surface, Name=Internal_Selection-1_gamma, Type=Element
Internal-1_Internal_Selection-1_gamma_S1, S1
Internal-1_Internal_Selection-1_gamma_S3, S3
Internal-1_Internal_Selection-1_gamma_S5, S5
Internal-1_Internal_Selection-1_gamma_S2, S2
Internal-1_Internal_Selection-1_gamma_S6, S6
Internal-1_Internal_Selection-1_gamma_S4, S4
**
** Physical constants ++++++++++++++++++++++++++++++++++++++
**
**
** Coordinate systems ++++++++++++++++++++++++++++++++++++++
**
**
** Materials +++++++++++++++++++++++++++++++++++++++++++++++
**
*Material, Name=Interior_wall
*Conductivity
0.7
*Material, Name=Isolation
*Conductivity
0.04
*Material, Name=Exterior_wall
*Conductivity
1
*Material, Name=Horizontal_structure
*Conductivity
2.5
*Material, Name=Floor
*Conductivity
1
**
** Sections ++++++++++++++++++++++++++++++++++++++++++++++++
**
*Solid section, Elset=Internal_Selection-1_Floor, Material=Floor
*Solid section, Elset=Internal_Selection-1_Horizontal_structure, Material=Horizontal_structure
*Solid section, Elset=Internal_Selection-1_Interior_wall, Material=Interior_wall
*Solid section, Elset=Internal_Selection-1_Exterior_wall, Material=Exterior_wall
*Solid section, Elset=Internal_Selection-1_Isolation, Material=Isolation
**
** Pre-tension sections ++++++++++++++++++++++++++++++++++++
**
**
** Constraints +++++++++++++++++++++++++++++++++++++++++++++
**
**
** Surface interactions ++++++++++++++++++++++++++++++++++++
**
**
** Contact pairs +++++++++++++++++++++++++++++++++++++++++++
**
**
** Amplitudes ++++++++++++++++++++++++++++++++++++++++++++++
**
**
** Initial conditions ++++++++++++++++++++++++++++++++++++++
**
**
** Steps +++++++++++++++++++++++++++++++++++++++++++++++++++
**
**
** Step-1 ++++++++++++++++++++++++++++++++++++++++++++++++++
**
*Step
*Heat transfer, Solver=Pardiso, Steady state
**
** Controls ++++++++++++++++++++++++++++++++++++++++++++++++
**
**
** Output frequency ++++++++++++++++++++++++++++++++++++++++
**
**
** Boundary conditions +++++++++++++++++++++++++++++++++++++
**
*Boundary, op=New
**
** Loads +++++++++++++++++++++++++++++++++++++++++++++++++++
**
*Cflux, op=New
*Film, op=New
** Name: alpha
*Film
Internal-1_Internal_Selection-1_alpha_S4, F4, 20, 0.005
Internal-1_Internal_Selection-1_alpha_S1, F1, 20, 0.005
** Name: beta
*Film
Internal-1_Internal_Selection-1_beta_S2, F2, 15, 0.005
Internal-1_Internal_Selection-1_beta_S5, F5, 15, 0.005
** Name: gamma
*Film
Internal-1_Internal_Selection-1_gamma_S1, F1, 0, 0.02
Internal-1_Internal_Selection-1_gamma_S3, F3, 0, 0.02
Internal-1_Internal_Selection-1_gamma_S5, F5, 0, 0.02
Internal-1_Internal_Selection-1_gamma_S2, F2, 0, 0.02
Internal-1_Internal_Selection-1_gamma_S6, F6, 0, 0.02
Internal-1_Internal_Selection-1_gamma_S4, F4, 0, 0.02
**
** Defined fields ++++++++++++++++++++++++++++++++++++++++++
**
**
** History outputs +++++++++++++++++++++++++++++++++++++++++
**
**
** Field outputs +++++++++++++++++++++++++++++++++++++++++++
**
*Node file
NT, RFL
*El file
HFL
**
** End step ++++++++++++++++++++++++++++++++++++++++++++++++
**
*End step
