**
** Heading +++++++++++++++++++++++++++++++++++++++++++++++++
**
*Heading
Hash: QKPyay6A, Date: 10/05/2026, Unit system: MM_TON_S_C
**
** Nodes +++++++++++++++++++++++++++++++++++++++++++++++++++
**
*Node
1, 5.09599304E+002, -2.05564590E+002, 1.20000000E+003
2, 5.09599304E+002, -2.55564590E+002, 1.20000000E+003
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**
** Elements ++++++++++++++++++++++++++++++++++++++++++++++++
**
*Element, Type=C3D8, Elset=Solid_part-1
1, 151, 3803, 33572, 3795, 1, 130, 3787, 139
2, 3803, 153, 3799, 33572, 130, 2, 131, 3787
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**
** Node sets +++++++++++++++++++++++++++++++++++++++++++++++
**
*Nset, Nset=N_Slab
6, 7, 12, 13, 14, 16
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*Nset, Nset=N_Floor
15, 16, 18, 20, 47, 48
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*Nset, Nset=N_Brick
1, 4, 5, 8, 10, 11
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*Nset, Nset=N_Insulation
1, 2, 3, 4, 5, 6
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*Nset, Nset=N_AC
2, 3, 6, 7, 9, 12
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*Nset, Nset=Internal-1_alpha
107, 109, 117, 118, 120, 122
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**
** Element sets ++++++++++++++++++++++++++++++++++++++++++++
**
*Elset, Elset=Slab
26798, 26799, 26800, 26801, 26802, 26803
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*Elset, Elset=Floor
63966, 63967, 63968, 63969, 63970, 63971
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*Elset, Elset=Brick
553, 554, 555, 556, 557, 558
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*Elset, Elset=Insulation
1, 2, 3, 4, 5, 6
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*Elset, Elset=AC
41, 42, 43, 44, 45, 46
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*Elset, Elset=Internal-1_alpha_S6
36741, 36746, 36751, 36756, 36761, 36766
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*Elset, Elset=Internal-1_alpha_S4
53080, 53085, 53090, 53095, 53100, 53105
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*Elset, Elset=Internal-1_alpha_S5
42318, 42319, 42320, 42321, 42322, 42323
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*Elset, Elset=Internal-1_beta_S5
3085, 3086, 3087, 3088, 3089, 3090
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*Elset, Elset=Internal-1_beta_S4
20429, 20434, 20439, 20444, 20449, 20454
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*Elset, Elset=Internal-1_gamma_S5
799, 800, 801, 808, 809, 810
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*Elset, Elset=Internal-1_gamma_S6
553, 556, 559, 562, 565, 568
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*Elset, Elset=Internal-1_gamma_S4
26877, 26882, 26887, 26892, 26897, 26902
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*Elset, Elset=Internal-1_gamma_S2
27348, 27349, 27350, 27351, 27352, 27353
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*Elset, Elset=Internal-1_gamma_S3
26873, 26874, 26875, 26876, 26877, 26898
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*Elset, Elset=Internal-1_gamma_S1
30013, 30014, 30015, 30016, 30017, 30018
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**
** Surfaces ++++++++++++++++++++++++++++++++++++++++++++++++
**
*Surface, Name=alpha, Type=Element
Internal-1_alpha_S6, S6
Internal-1_alpha_S4, S4
Internal-1_alpha_S5, S5
*Surface, Name=beta, Type=Element
Internal-1_beta_S5, S5
Internal-1_beta_S4, S4
*Surface, Name=gamma, Type=Element
Internal-1_gamma_S5, S5
Internal-1_gamma_S6, S6
Internal-1_gamma_S4, S4
Internal-1_gamma_S2, S2
Internal-1_gamma_S3, S3
Internal-1_gamma_S1, S1
**
** Physical constants ++++++++++++++++++++++++++++++++++++++
**
**
** Coordinate systems ++++++++++++++++++++++++++++++++++++++
**
**
** Materials +++++++++++++++++++++++++++++++++++++++++++++++
**
*Material, Name=AC
*Conductivity
0.7
*Material, Name=Insulation
*Conductivity
0.04
*Material, Name=Brick
*Conductivity
1
*Material, Name=Slab
*Conductivity
2.5
*Material, Name=Floor
*Conductivity
1
**
** Sections ++++++++++++++++++++++++++++++++++++++++++++++++
**
*Solid section, Elset=AC, Material=AC
*Solid section, Elset=Insulation, Material=Insulation
*Solid section, Elset=Brick, Material=Brick
*Solid section, Elset=Slab, Material=Slab
*Solid section, Elset=Floor, Material=Floor
**
** Pre-tension sections ++++++++++++++++++++++++++++++++++++
**
**
** Constraints +++++++++++++++++++++++++++++++++++++++++++++
**
**
** Surface interactions ++++++++++++++++++++++++++++++++++++
**
**
** Contact pairs +++++++++++++++++++++++++++++++++++++++++++
**
**
** Amplitudes ++++++++++++++++++++++++++++++++++++++++++++++
**
**
** Initial conditions ++++++++++++++++++++++++++++++++++++++
**
**
** Steps +++++++++++++++++++++++++++++++++++++++++++++++++++
**
**
** Step-1 ++++++++++++++++++++++++++++++++++++++++++++++++++
**
*Step
*Heat transfer, Solver=Pardiso, Steady state
**
** Controls ++++++++++++++++++++++++++++++++++++++++++++++++
**
**
** Output frequency ++++++++++++++++++++++++++++++++++++++++
**
**
** Boundary conditions +++++++++++++++++++++++++++++++++++++
**
*Boundary, op=New
**
** Loads +++++++++++++++++++++++++++++++++++++++++++++++++++
**
*Cflux, op=New
*Film, op=New
** Name: alpha
*Film
Internal-1_alpha_S6, F6, 20, 0.005
Internal-1_alpha_S4, F4, 20, 0.005
Internal-1_alpha_S5, F5, 20, 0.005
** Name: beta
*Film
Internal-1_beta_S5, F5, 15, 0.005
Internal-1_beta_S4, F4, 15, 0.005
** Name: gamma
*Film
Internal-1_gamma_S5, F5, 0, 0.02
Internal-1_gamma_S6, F6, 0, 0.02
Internal-1_gamma_S4, F4, 0, 0.02
Internal-1_gamma_S2, F2, 0, 0.02
Internal-1_gamma_S3, F3, 0, 0.02
Internal-1_gamma_S1, F1, 0, 0.02
**
** Defined fields ++++++++++++++++++++++++++++++++++++++++++
**
**
** History outputs +++++++++++++++++++++++++++++++++++++++++
**
**
** Field outputs +++++++++++++++++++++++++++++++++++++++++++
**
*Node file
NT, RFL
*El file
HFL
**
** End step ++++++++++++++++++++++++++++++++++++++++++++++++
**
*End step
