**
** Heading +++++++++++++++++++++++++++++++++++++++++++++++++
**
*Heading
Hash: Yj63WC7Y, Date: 10/05/2026, Unit system: MM_TON_S_C
**
** Nodes +++++++++++++++++++++++++++++++++++++++++++++++++++
**
*Node
1, 1.39637740E+001, -5.02600719E+002, 4.75000000E+002
2, 1.39637740E+001, -9.52600719E+002, 4.75000000E+002
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**
** Elements ++++++++++++++++++++++++++++++++++++++++++++++++
**
*Element, Type=C3D8, Elset=Solid_part-11
1, 1513, 37, 1, 69, 19732, 1609, 107, 2547
2, 19732, 1609, 107, 2547, 19733, 1641, 108, 2550
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*Element, Type=C3D8, Elset=Solid_part-12
1981, 2685, 233, 9, 265, 21076, 3228, 362, 3758
1982, 21076, 3228, 362, 3758, 21077, 3196, 361, 3755
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*Element, Type=C3D8, Elset=Solid_part-13
3961, 3857, 429, 17, 461, 22420, 5329, 540, 6252
3962, 22420, 5329, 540, 6252, 22421, 5297, 539, 6219
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*Element, Type=C3D8, Elset=Solid_part-14
20791, 7341, 653, 21, 685, 37204, 8813, 764, 9307
20792, 37204, 8813, 764, 9307, 37205, 8781, 763, 9308
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*Element, Type=C3D8, Elset=Solid_part-15
37621, 25, 877, 10825, 946, 947, 11021, 51988, 11111
37622, 947, 11021, 51988, 11111, 948, 11022, 51989, 11118
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*Element, Type=C3D8, Elset=Solid_part-16
38549, 11427, 1023, 10, 300, 52576, 11539, 316, 3268
38550, 52576, 11539, 316, 3268, 52577, 11532, 315, 3265
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*Element, Type=C3D8, Elset=Solid_part-17
39029, 11644, 1037, 4, 72, 52870, 13129, 180, 2099
39030, 52870, 13129, 180, 2099, 52871, 13096, 179, 2100
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*Element, Type=C3D8, Elset=Solid_part-18
55859, 15128, 1070, 3, 1036, 67654, 13610, 184, 11643
55860, 67654, 13610, 184, 11643, 67655, 13643, 185, 11636
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*Element, Type=C3D8, Elset=Solid_part-19
59939, 12, 268, 16150, 1293, 379, 3718, 70888, 15905
59940, 379, 3718, 70888, 15905, 378, 3717, 70889, 15906
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*Element, Type=C3D8, Elset=Solid_part-20
76769, 19172, 1499, 18, 526, 85672, 19403, 541, 5822
76770, 85672, 19403, 541, 5822, 85673, 19410, 542, 5789
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**
** Node sets +++++++++++++++++++++++++++++++++++++++++++++++
**
*Nset, Nset=Internal-1_Internal_Selection-1_Exterior
1, 2, 3, 4, 9, 10
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*Nset, Nset=Internal-1_Internal_Selection-1_Interior
5, 6, 7, 8, 13, 14
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**
** Element sets ++++++++++++++++++++++++++++++++++++++++++++
**
*Elset, Elset=Internal_Selection-1_Iron_bar
Solid_part-15,
Solid_part-16
*Elset, Elset=Internal-1_Internal_Selection-1_Exterior_S1
1, 16, 31, 46, 61, 76
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*Elset, Elset=Internal-1_Internal_Selection-1_Interior_S2
15, 30, 45, 60, 75, 90
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*Elset, Elset=Internal-1_Internal_Selection-1_Interior_S1
37621, 37625, 37629, 37633, 37637, 37641
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*Elset, Elset=Internal-1_Internal_Selection-1_Interior_S3
37621, 37622, 37623, 37624, 37653, 37654
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*Elset, Elset=Internal-1_Internal_Selection-1_Interior_S6
37621, 37622, 37623, 37624, 37625, 37626
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*Elset, Elset=Internal-1_Internal_Selection-1_Interior_S5
37649, 37650, 37651, 37652, 37681, 37682
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*Elset, Elset=Internal_Selection-1_Insulation_layer
Solid_part-11,
Solid_part-12,
Solid_part-13,
Solid_part-14,
Solid_part-17,
Solid_part-18,
Solid_part-19,
Solid_part-20
**
** Surfaces ++++++++++++++++++++++++++++++++++++++++++++++++
**
*Surface, Name=Internal_Selection-1_Exterior, Type=Element
Internal-1_Internal_Selection-1_Exterior_S1, S1
*Surface, Name=Internal_Selection-1_Interior, Type=Element
Internal-1_Internal_Selection-1_Interior_S2, S2
Internal-1_Internal_Selection-1_Interior_S1, S1
Internal-1_Internal_Selection-1_Interior_S3, S3
Internal-1_Internal_Selection-1_Interior_S6, S6
Internal-1_Internal_Selection-1_Interior_S5, S5
**
** Physical constants ++++++++++++++++++++++++++++++++++++++
**
**
** Coordinate systems ++++++++++++++++++++++++++++++++++++++
**
**
** Materials +++++++++++++++++++++++++++++++++++++++++++++++
**
*Material, Name=Insulation
*Conductivity
0.1
*Material, Name=Iron
*Conductivity
50
**
** Sections ++++++++++++++++++++++++++++++++++++++++++++++++
**
*Solid section, Elset=Internal_Selection-1_Insulation_layer, Material=Insulation
*Solid section, Elset=Internal_Selection-1_Iron_bar, Material=Iron
**
** Pre-tension sections ++++++++++++++++++++++++++++++++++++
**
**
** Constraints +++++++++++++++++++++++++++++++++++++++++++++
**
**
** Surface interactions ++++++++++++++++++++++++++++++++++++
**
**
** Contact pairs +++++++++++++++++++++++++++++++++++++++++++
**
**
** Amplitudes ++++++++++++++++++++++++++++++++++++++++++++++
**
**
** Initial conditions ++++++++++++++++++++++++++++++++++++++
**
**
** Steps +++++++++++++++++++++++++++++++++++++++++++++++++++
**
**
** Step-1 ++++++++++++++++++++++++++++++++++++++++++++++++++
**
*Step
*Heat transfer, Solver=Pardiso, Steady state
**
** Controls ++++++++++++++++++++++++++++++++++++++++++++++++
**
**
** Output frequency ++++++++++++++++++++++++++++++++++++++++
**
**
** Boundary conditions +++++++++++++++++++++++++++++++++++++
**
*Boundary, op=New
**
** Loads +++++++++++++++++++++++++++++++++++++++++++++++++++
**
*Cflux, op=New
*Film, op=New
** Name: Exterior
*Film
Internal-1_Internal_Selection-1_Exterior_S1, F1, 0, 0.01
** Name: Interior
*Film
Internal-1_Internal_Selection-1_Interior_S2, F2, 1, 0.01
Internal-1_Internal_Selection-1_Interior_S1, F1, 1, 0.01
Internal-1_Internal_Selection-1_Interior_S3, F3, 1, 0.01
Internal-1_Internal_Selection-1_Interior_S6, F6, 1, 0.01
Internal-1_Internal_Selection-1_Interior_S5, F5, 1, 0.01
**
** Defined fields ++++++++++++++++++++++++++++++++++++++++++
**
**
** History outputs +++++++++++++++++++++++++++++++++++++++++
**
**
** Field outputs +++++++++++++++++++++++++++++++++++++++++++
**
*Node file
NT, RFL
*El file
HFL
**
** End step ++++++++++++++++++++++++++++++++++++++++++++++++
**
*End step
