**
** Heading +++++++++++++++++++++++++++++++++++++++++++++++++
**
*Heading
Hash: ALtpAiMK, Date: 10/05/2026, Unit system: MM_TON_S_C
**
** Nodes +++++++++++++++++++++++++++++++++++++++++++++++++++
**
*Node
1, 6.87187541E+003, 7.23288998E+003, -1.29598842E+002
2, 5.31512922E+003, 8.33753186E+003, -1.33784879E+003
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**
** Elements ++++++++++++++++++++++++++++++++++++++++++++++++
**
*Element, Type=C3D20, Elset=Shell_part-1
1, 9097, 9076, 3156, 9096, 14211, 14242, 14243, 14212, 2002, 6681, 6680, 6722, 17949, 17950, 17951,
17886, 10716, 10747, 10748, 10717
2, 53498, 53529, 53530, 53499, 66594, 66625, 66626, 66595, 57235, 57236, 57237, 57172, 70331, 70332, 70333,
70268, 63099, 63130, 63131, 63100
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**
** Node sets +++++++++++++++++++++++++++++++++++++++++++++++
**
*Nset, Nset=Internal_Selection-1_Displacement_Rotation-1
3, 265, 266, 283, 284, 285
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*Nset, Nset=Internal_Selection-1_Displacement_Rotation-2
167, 264, 362, 3441, 3442, 3443
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*Nset, Nset=Internal_Selection-1_Displacement_Rotation-3
9797, 9799, 13098, 22895, 26194, 35991, 39290, 49087, 52386, 62183, 65482
*Nset, Nset=Internal_Selection-1_Concentrated_Force-1
361, 9798, 13097, 22894, 26193, 35990, 39289, 49086, 52385, 62182, 65481
*Nset, Nset=Internal_Selection-1_Concentrated_Force-2
362, 9800, 13099, 22896, 26195, 35992, 39291, 49088, 52387, 62184, 65483
**
** Element sets ++++++++++++++++++++++++++++++++++++++++++++
**
*Elset, Elset=Missing_section-1
1, 3, 4, 5, 6, 8
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*Elset, Elset=Internal_Selection-1_Solid_Section-1
Shell_part-1
**
** Surfaces ++++++++++++++++++++++++++++++++++++++++++++++++
**
**
** Physical constants ++++++++++++++++++++++++++++++++++++++
**
**
** Coordinate systems ++++++++++++++++++++++++++++++++++++++
**
**
** Materials +++++++++++++++++++++++++++++++++++++++++++++++
**
*Material, Name=Material-1
*Elastic
68250, 0.3
**
** Sections ++++++++++++++++++++++++++++++++++++++++++++++++
**
*Solid section, Elset=Internal_Selection-1_Solid_Section-1, Material=Material-1
**
** Pre-tension sections ++++++++++++++++++++++++++++++++++++
**
**
** Constraints +++++++++++++++++++++++++++++++++++++++++++++
**
**
** Surface interactions ++++++++++++++++++++++++++++++++++++
**
**
** Contact pairs +++++++++++++++++++++++++++++++++++++++++++
**
**
** Amplitudes ++++++++++++++++++++++++++++++++++++++++++++++
**
**
** Initial conditions ++++++++++++++++++++++++++++++++++++++
**
**
** Steps +++++++++++++++++++++++++++++++++++++++++++++++++++
**
**
** Step-1 ++++++++++++++++++++++++++++++++++++++++++++++++++
**
*Step
*Static, Solver=Pardiso
**
** Controls ++++++++++++++++++++++++++++++++++++++++++++++++
**
**
** Output frequency ++++++++++++++++++++++++++++++++++++++++
**
**
** Boundary conditions +++++++++++++++++++++++++++++++++++++
**
*Boundary, op=New
** Name: Displacement_Rotation-1
*Boundary
Internal_Selection-1_Displacement_Rotation-1, 2, 2, 0
** Name: Displacement_Rotation-2
*Boundary
Internal_Selection-1_Displacement_Rotation-2, 1, 1, 0
** Name: Displacement_Rotation-3
*Boundary
Internal_Selection-1_Displacement_Rotation-3, 3, 3, 0
**
** Loads +++++++++++++++++++++++++++++++++++++++++++++++++++
**
*Cload, op=New
*Dload, op=New
** Name: Concentrated_Force-1
*Cload
Internal_Selection-1_Concentrated_Force-1, 1, -1.81818182E+002
** Name: Concentrated_Force-2
*Cload
Internal_Selection-1_Concentrated_Force-2, 2, 181.818181818182
**
** Defined fields ++++++++++++++++++++++++++++++++++++++++++
**
**
** History outputs +++++++++++++++++++++++++++++++++++++++++
**
**
** Field outputs +++++++++++++++++++++++++++++++++++++++++++
**
*Node file
RF, U
*El file
S, E, NOE
**
** End step ++++++++++++++++++++++++++++++++++++++++++++++++
**
*End step
